WingFlap
#Mach
0.0
#IYsym   IZsym   Zsym
0      0      0.0
#Sref    Cref    Bref
149.38    3.5     42.6
#Xref    Yref    Zref
0.0      0.0     0.0
#
#
#====================================================================
SURFACE
Wing

#Nchordwise  Cspace   Nspanwise   Sspace
5           1.0      11         1.0
#
ANGLE
0.0


YDUPLICATE
0

#-------------------------------------------------------------
SECTION
#Xle    Yle    Zle     Chord   Ainc  Nspanwise  Sspace
0.0     0.0    0        3.5     0          0         0
CONTROL
flap1   1.0   0.80   0. 0. 0.   1
NACA
6412
#-------------------------------------------------------------
SECTION
#Xle    Yle    Zle     Chord   Ainc  Nspanwise  Sspace
3.5       21.3   0       3.5    -1     0          0
CONTROL
flap1   1.0   0.80   0. 0. 0.   1
NACA
6412
#-------------------------------------------------------------

SURFACE
Wing2

#Nchordwise  Cspace   Nspanwise   Sspace
5           1.0      11         1.0
#
ANGLE
0.0


YDUPLICATE
0

#-------------------------------------------------------------
SECTION
#Xle    Yle    Zle     Chord   Ainc  Nspanwise  Sspace
20     0.0    0.2      3.5     0          0         0
CONTROL
elevator   1.0   0.80   0. 0. 0.   1
NACA
0014
#-------------------------------------------------------------
SECTION
#Xle    Yle    Zle     Chord   Ainc  Nspanwise  Sspace
21      8   0.2         3.5    -1     0          0
CONTROL
elevator  1.0   0.80   0. 0. 0.   1
NACA
0014
#-------------------------------------------------------------

# Flaps
# Rudder
# Elevators
